// COMSOL Multiphysics 6.3.0.420 model "testnovo.mph"
// Outline of the model tree

Parameters
  w_core = 6[um]
  t_core = 2[um]
  w_clad = w_core + 2 * t_air
  t_clad = t_core + 2 * t_air
  t_air = 6[um]
  solE1 = 'sol1'
  iE1 = 10
  n_SiO2 = sqrt(1 + 0.6961663 * wv_norm^2 / (wv_norm^2 - 0.0684043^2) + 0.4079426 * wv_norm^2 / (wv_norm^2 - 0.1162414^2) + 0.8974794 * wv_norm^2 / (wv_norm^2 - 9.896161))
  n_TiO2 = sqrt(5.913 + 0.2441/(wv_norm^2 - 0.0803))
  n_Si3N4 = sqrt(1 + 2.8939 * wv_norm^2 / (wv_norm^2 - 0.13967^2))
  n_Ag3AsS3 = sqrt(7.483 + 0.474/(wv_norm^2 - 0.09) - 0.0019 * wv_norm^2)
  mu_r_SiO2 = 1
  mu_r_TiO2 = 1
  mu_r_Si3N4 = 1
  mu_r_Ag3AsS3 = 1
  eps_r_SiO2 = n_SiO2/mu_r_SiO2
  eps_r_TiO2 = n_TiO2/mu_r_TiO2
  eps_r_Si3N4 = n_Si3N4/mu_r_Si3N4
  eps_r_Ag3AsS3 = n_Ag3AsS3/mu_r_Ag3AsS3
  sigma_SiO2 = 1e-12[S/m]
  sigma_TiO2 = 1e-12[S/m]
  wv0 = 1.55[um]
  wv_norm = wv0/1[um]
  k0 = 2 * pi / wv0
  f0 = c_const/wv0
  omega0 = 2 * pi * f0
  mu_SiO2 = mu0_const * mu_r_SiO2
  mu_TiO2 = mu0_const * mu_r_TiO2
  mu_Si3N4 = mu0_const * mu_r_Si3N4
  mu_Ag3AsS3 = mu0_const * mu_r_Ag3AsS3
  eps_SiO2 = epsilon0_const * eps_r_SiO2
  eps_TiO2 = epsilon0_const * eps_r_TiO2
  eps_Si3N4 = epsilon0_const * eps_r_Si3N4
  eps_Ag3AsS3 = epsilon0_const * eps_r_Ag3AsS3
  k_SiO2 = k0 * n_SiO2
  k_TiO2 = k0 * n_TiO2
  k_Si3N4 = k0 * n_Si3N4
  k_Ag3AsS3 = k0 * n_Ag3AsS3

Variables
  var1 "Field components"
    beta = k0 * emw.neff  // Propagation constant
    Hx = (d(Ez, y) - d(Ey, z)) / ( i*omega0*mu_SiO2 )  // Magnetic field, x-component
    Hy = ( d(Ex, z) - d(Ez, x) ) / ( i*omega0*mu_SiO2 )  // Magnetic field, y-component
    Hz = ( d(Ey, x) - d(Ex, y) ) / ( i*omega0*mu_SiO2 )  // Magnetic field, z-component

Geometry
  geom1 "Geometry" (2D, length unit m)
    r1: Rectangle "Core" | size = {w_core, t_core}; base = center
    r2: Rectangle "Cladding" | size = {w_clad, t_clad}; base = center
    fin: Finalize "Form Union"

Materials
  mat0: Common "Air" on domains 1
    def: def "Basic"
      thermalconductivity = k(T)
      heatcapacity = C_gas_2(T)
      density = rho_gas_2(T)
      TD = TD(T)
      dynamicviscosity = eta(T)
      electricconductivity = 1e-15
      relpermeability = 1
      relpermittivity = 1
      k: Piecewise | arg = T; pieces = {70.0, 1000.0, -8.404165E-4+1.107418E-4*T^1-8.635537E-8*T^2+6.31411E-11*T^3-1.88168E-14*T^4}; argunit = K; fununit = W/(m*K)
      C_gas_2: Piecewise
        arg = T
        pieces = 
          {100.0, 375.0, 1010.969937+0.0439479182*T^1-2.922398306E-4*T^2+6.503466888E-7*T^3}
          {375.0, 1300.0, 1093.290221-0.6355521987*T^1+0.001633992309*T^2-1.412935077E-6*T^3+5.594920028E-10*T^4-8.663071391E-14*T^5}
          {1300.0, 3000.0, 701.3247209+0.8493867665*T^1-5.846488472E-4*T^2+2.302436314E-7*T^3-4.846756792E-11*T^4+4.23501924E-15*T^5}
        argunit = K
        fununit = J/(kg*K)
      rho_gas_2: Piecewise | arg = T; pieces = {80.0, 3000.0, 352.716*T^-1}; argunit = K; fununit = kg/m^3
      TD: Piecewise
        arg = T
        pieces = 
          {300.0, 753.0, 1.713214E-4-1.204913E-6*T^1+2.839046E-9*T^2-1.532799E-12*T^3}
          {753.0, 873.16, 0.004163524016-1.191227E-5*T^1+8.863636E-9*T^2}
        argunit = K
        fununit = m^2/s
      eta: Piecewise
        arg = T
        pieces = 
          {120.0, 600.0, -1.132275E-7+7.94333E-8*T^1-7.197989E-11*T^2+5.158693E-14*T^3-1.592472E-17*T^4}
          {600.0, 2150.0, 3.901009726E-6+5.75387E-8*T^1-2.675811E-11*T^2+9.709691E-15*T^3-1.355541E-18*T^4}
        argunit = K
        fununit = Pa*s
  mat1: Common "SiO2" on domains 2
    def: def "Basic"
      thermalconductivity = k_solid_1(T)
      resistivity = res_solid_1(T)
      thermalexpansioncoefficient = (alpha_solid_NIST_SRM_739_Type_I_1(T)+(Tempref-293[K])*if(abs(T-Tempref)>1e-3,(alpha_solid_NIST_SRM_739_Type_I_1(T)-alpha_solid_NIST_SRM_739_Type_I_1(Tempref))/(T-Tempref),d(alpha_solid_NIST_SRM_739_Type_I_1(T),T)))/(1+alpha_solid_NIST_SRM_739_Type_I_1(Tempref)*(Tempref-293[K]))
      heatcapacity = C_solid_1(T)
      electricconductivity = sigma_SiO2
      HC = HC_solid_1(T)
      emissivity = epsilon(T)
      density = rho(T)
      TD = TD(T)
      relpermeability = mu_r_SiO2
      relpermittivity = eps_r_SiO2
      k_solid_1: Piecewise
        arg = T
        pieces = 
          {5.0, 280.0, 0.09229359+0.003299521*T^1+4.343238E-5*T^2-2.258807E-7*T^3+3.049078E-10*T^4}
          {280.0, 1400.0, -0.9865905408+0.01820907*T^1-5.290512E-5*T^2+7.552525E-8*T^3-5.008123E-11*T^4+1.311324E-14*T^5}
          {1400.0, 1473.16, -1798.511697+4.192721*T^1-0.003251176*T^2+8.408144E-7*T^3}
        argunit = K
        fununit = W/(m*K)
      res_solid_1: Piecewise | arg = T; pieces = {293.0, 823.16, exp(2.719273E-10*T^4 - 7.491946E-07*T^3 + 8.035453E-04*T^2 - 4.185428E-01*T + 1.025761E+02)}; argunit = K; fununit = ohm*m
      alpha_solid_NIST_SRM_739_Type_I_1: Piecewise | arg = T; pieces = {80.0, 1000.0, -3.695793E-7+5.412844E-9*T^1-1.114924E-11*T^2+1.004725E-14*T^3-3.418476E-18*T^4}; argunit = K; fununit = 1/K
      C_solid_1: Piecewise
        arg = T
        pieces = 
          {10.0, 130.0, -8.361545887+0.8142406419*T^1+0.04992099266*T^2-4.462348173E-4*T^3+1.680511052E-6*T^4-2.285316996E-9*T^5}
          {130.0, 925.0, 62.30909074+1.926793852*T^1+0.004463630318*T^2-1.704271184E-5*T^3+1.88108948E-8*T^4-7.062467233E-12*T^5}
          {925.0, 2000.0, 890.996034+0.3707459249*T^1-1.107603655E-4*T^2+3.139437058E-8*T^3}
        argunit = K
        fununit = J/(kg*K)
      sigma_solid_1: Piecewise | arg = T; pieces = {293.0, 823.16, 1/(exp(2.719273E-10*T^4-7.491946E-07*T^3+8.035453E-04*T^2-4.185428E-01*T+1.025761E+02))}; argunit = K; fununit = S/m
      HC_solid_1: Piecewise
        arg = T
        pieces = 
          {10.0, 135.0, -0.851317321+0.073081305*T^1+0.003244583977*T^2-3.755320866E-5*T^3+1.984074896E-7*T^4-5.03858518E-10*T^5+4.954797107E-13*T^6}
          {135.0, 925.0, 3.732763257+0.1154128555*T^1+2.697214475E-4*T^2-1.027028225E-6*T^3+1.133062948E-9*T^4-4.253437455E-13*T^5}
          {925.0, 2000.0, 53.78772203+0.02165727523*T^1-6.251109886E-6*T^2+1.800144733E-9*T^3}
        argunit = K
        fununit = J/(mol*K)
      epsilon: Piecewise | arg = T; pieces = {75.0, 312.0, 0.7833939267-7.142203262E-4*T^1+2.090763018E-6*T^2}; argunit = K
      rho: Piecewise | arg = T; pieces = {80.0, 1000.0, 2219.39+0.01105999*T^1-4.708012E-5*T^2+6.980692E-8*T^3-4.995273E-11*T^4+1.430874E-14*T^5}; argunit = K; fununit = kg/m^3
      TD: Piecewise | arg = T; pieces = {82.0, 1039.0, 1.559138E-6-4.991949E-9*T^1+1.170891E-11*T^2-1.277613E-14*T^3+5.492523E-18*T^4}; argunit = K; fununit = m^2/s
    ThermalExpansion: ThermalExpansion
      alphatan = CTE_solid_NIST_SRM_739_Type_I_1(T)
      dL = (dL_solid_NIST_SRM_739_Type_I_1(T)-dL_solid_NIST_SRM_739_Type_I_1(Tempref))/(1+dL_solid_NIST_SRM_739_Type_I_1(Tempref))
      dL_solid_NIST_SRM_739_Type_I_1: Piecewise | arg = T; pieces = {80.0, 1000.0, 9.433058E-5-1.712933E-6*T^1+7.374643E-9*T^2-1.113379E-11*T^3+8.078969E-15*T^4-2.330577E-18*T^5}; argunit = K
      CTE_solid_NIST_SRM_739_Type_I_1: Piecewise | arg = T; pieces = {80.0, 1000.0, -1.712933E-6+1.474929E-8*T^1-3.340137E-11*T^2+3.231588E-14*T^3-1.165288E-17*T^4}; argunit = K; fununit = 1/K
    Enu: Enu "Young's modulus and Poisson's ratio"
      E = E(T)
      nu = nu(T)
      E: Piecewise
        arg = T
        pieces = 
          {2.0, 170.0, 7.19219E10-7.955576E7*T^1+1200039.0*T^2-7440.215*T^3+21.72957*T^4-0.02394189*T^5}
          {170.0, 1700.0, 6.907333208E10+1.167539E7*T^1+11447.54*T^2-25.91953*T^3+0.01545627*T^4-3.022226E-6*T^5}
        argunit = K
        fununit = Pa
      nu: Piecewise
        arg = T
        pieces = 
          {2.0, 170.0, 0.1623859-3.46611E-4*T^1+5.42002E-6*T^2-2.78502E-8*T^3+4.878708E-11*T^4}
          {170.0, 950.0, 0.1441971754+2.285363E-4*T^1-9.253567E-7*T^2+1.832686E-9*T^3-1.635196E-12*T^4+5.369587E-16*T^5}
          {950.0, 1700.0, 0.04187381327+4.230553E-4*T^1-4.739473E-7*T^2+2.308844E-10*T^3-4.040605E-14*T^4}
        argunit = K
    KG: KG "Bulk modulus and shear modulus"
      K = kappa(T)
      G = mu(T)
      mu: Piecewise
        arg = T
        pieces = 
          {2.0, 170.0, 3.093791E10-2.513966E7*T^1+372325.4*T^2-2429.327*T^3+7.746996*T^4-0.009450154*T^5}
          {170.0, 450.0, 3.087101531E10-6676611.0*T^1+36600.0*T^2-35.83581*T^3}
          {450.0, 1700.0, 2.914662208E10+9388166.0*T^1-8173.552*T^2+3.504887*T^3-5.616985E-4*T^4}
        argunit = K
        fununit = Pa
      kappa: Piecewise
        arg = T
        pieces = 
          {2.0, 170.0, 3.548804E10-7.249187E7*T^1+1081126.0*T^2-5664.153*T^3+10.51074*T^4}
          {170.0, 950.0, 3.233763855E10+2.830576E7*T^1-87346.28*T^2+175.3606*T^3-0.1614875*T^4+5.404807E-5*T^5}
          {950.0, 1700.0, 1.340225327E10+8.005859E7*T^1-86531.61*T^2+41.37606*T^3-0.007122425*T^4}
        argunit = K
        fununit = Pa
  mat2: Common "TiO2 (rutile)" on domains 2
    def: def "Basic"
      thermalconductivity = k_solid_polycrystal_1(T)
      resistivity = res(T)
      thermalexpansioncoefficient = (alpha_solid_polycrystal_1(T)+(Tempref-293[K])*if(abs(T-Tempref)>1e-3,(alpha_solid_polycrystal_1(T)-alpha_solid_polycrystal_1(Tempref))/(T-Tempref),d(alpha_solid_polycrystal_1(T),T)))/(1+alpha_solid_polycrystal_1(Tempref)*(Tempref-293[K]))
      heatcapacity = C_solid_1(T)
      electricconductivity = sigma_TiO2
      HC = HC_solid_1(T)
      density = rho(T)
      TD = TD(T)
      relpermeability = mu_r_TiO2
      relpermittivity = eps_r_TiO2
      k_solid_polycrystal_1: Piecewise
        arg = T
        pieces = 
          {0.1, 1.0, (exp(1.634501575E+00*T^3 - 1.129383964E+01*T^2 + 1.828421050E+01*T - 1.233018999E+01))*1.000000000e+02}
          {1.0, 20.0, (exp(-1.276212785E-04*T^4 + 7.986033634E-03*T^3 - 1.961905242E-01*T^2 + 2.137703745E+00*T - 5.654689191E+00))*1.000000000e+02}
          {20.0, 100.0, (exp(6.701602398E-08*T^4 - 2.718434226E-05*T^3 + 4.115147327E-03*T^2 - 2.872452463E-01*T + 6.397638710E+00))*1.000000000e+02}
          {100.0, 1473.16, (exp(8.207398279E-13*T^4 - 4.021716307E-09*T^3 + 7.653578953E-06*T^2 - 6.763303807E-03*T - 1.054418279E+00))*1.000000000e+02}
        argunit = K
        fununit = W/(m*K)
      res: Piecewise | arg = T; pieces = {453.0, 1653.16, exp(2.64083356E-12*T^4 - 1.60887392E-08*T^3 + 4.18895710E-05*T^2 - 5.96977142E-02*T + 3.50249970E+01)}; argunit = K; fununit = ohm*m
      alpha_solid_polycrystal_1: Piecewise | arg = T; pieces = {73.0, 2023.16, 6.36984E-6+4.76285E-9*T^1-2.892412E-12*T^2+6.890362E-16*T^3-5.716508E-20*T^4}; argunit = K; fununit = 1/K
      C_solid_1: Piecewise
        arg = T
        pieces = 
          {13.0, 47.0, 12.4343609-2.610589675*T^1+0.204219748*T^2-0.008480584578*T^3+2.915525816E-4*T^4-5.349468137E-6*T^5+3.816311256E-8*T^6}
          {47.0, 183.0, -55.92868362+2.287556625*T^1+0.008644790888*T^2-3.100504306E-5*T^3+1.900663002E-8*T^4}
          {183.0, 515.0, -241.6826865+5.870676506*T^1-0.01264556068*T^2+1.309407113E-5*T^3-5.268787981E-9*T^4}
          {515.0, 1800.0, 275.9869946+2.178524919*T^1-0.002973515818*T^2+2.07333985E-6*T^3-7.14849044E-10*T^4+9.683208141E-14*T^5}
        argunit = K
        fununit = J/(kg*K)
      sigma: Piecewise | arg = T; pieces = {453.0, 1653.16, 1/(exp(2.64083356E-12*T^4-1.60887392E-08*T^3+4.18895710E-05*T^2-5.96977142E-02*T+3.50249970E+01))}; argunit = K; fununit = S/m
      HC_solid_1: Piecewise
        arg = T
        pieces = 
          {13.0, 47.0, 0.9935054356-0.2085861152*T^1+0.01631715788*T^2-6.77598708E-4*T^3+2.329505128E-5*T^4-4.274225073E-7*T^5+3.049232695E-9*T^6}
          {47.0, 183.0, -4.468702456+0.1827757744*T^1+6.907187906E-4*T^2-2.477302941E-6*T^3+1.51862974E-9*T^4}
          {183.0, 515.0, -19.31044712+0.4690670517*T^1-0.001010380298*T^2+1.046216284E-6*T^3-4.209761599E-10*T^4}
          {515.0, 1800.0, 22.05135979+0.1740641412*T^1-2.375839137E-4*T^2+1.656598538E-7*T^3-5.71164388E-11*T^4+7.736883306E-15*T^5}
        argunit = K
        fununit = J/(mol*K)
      rho: Piecewise | arg = T; pieces = {73.0, 2023.16, 4273.733-0.06271041*T^1-7.695907E-5*T^2+4.508161E-8*T^3-8.763289E-12*T^4}; argunit = K; fununit = kg/m^3
      TD: Piecewise
        arg = T
        pieces = 
          {293.0, 516.0, 1.984572904E-5-1.22506365E-7*T^1+3.21359436E-10*T^2-3.95173092E-13*T^3+1.8877905E-16*T^4}
          {516.0, 1264.0, 1.00258912E-5-4.4552743E-8*T^1+8.87155034E-11*T^2-8.84870622E-14*T^3+4.36994835E-17*T^4-8.51220485E-21*T^5}
          {1264.0, 1473.16, 0.00192564789-8.49780591E-6*T^1+1.5617035E-8*T^2-1.52924762E-11*T^3+8.41540724E-15*T^4-2.46760198E-18*T^5+3.012147E-22*T^6}
        argunit = K
        fununit = m^2/s
    ThermalExpansion: ThermalExpansion
      alphatan = CTE_solid_polycrystal_1(T)
      dL = (dL_solid_polycrystal_1(T)-dL_solid_polycrystal_1(Tempref))/(1+dL_solid_polycrystal_1(Tempref))
      dL_solid_polycrystal_1: Piecewise | arg = T; pieces = {73.0, 2023.16, -0.001856432+4.787471E-6*T^1+6.276645E-9*T^2-3.589312E-12*T^3+6.979445E-16*T^4}; argunit = K
      CTE_solid_polycrystal_1: Piecewise | arg = T; pieces = {100.0, 1400.0, 5.749452E-6+6.084767E-9*T^1-3.041074E-13*T^2-2.987351E-15*T^3+1.171088E-18*T^4}; argunit = K; fununit = 1/K

Physics
  emw: ElectromagneticWaves "Electromagnetic Waves, Frequency Domain" on all domains
    dependent variable E = {Ex, Ey, Ez}
    wee1: WaveEquationElectric (default)
    pec1: PerfectElectricConductor (default)
    init1: init "Initial Values 1" (default)

Mesh
  mesh1 "Mesh"
    size: MeshSizeDefault | hmax = 1.21E-6; hmin = 5.4E-9; hcurve = 0.3; hgrad = 1.3
    ftri1: FreeTri "Core" on domains 2
      size1: Size on domains 2 | hauto = 2
    ftri2: FreeTri "Cladding" on domains 1
      size1: Size on domains 1

Studies
  std1 "Study 1"
    mode: ModeAnalysis | modeFreq = f0; shift = 3.5; linpsolnum = auto; neigs = 6

Solver configurations
  sol1 "Solution 1" (study std1)
    v1: Variables "Dependent Variables 1"
    e1: Eigenvalue "Eigenvalue Solver 1"
      d1: Direct "Suggested Direct Solver (emw)"

Datasets
  dset1: Solution | solution = sol1

Derived values
  av1: AvSurface "Surface Average 1" on domains 2
    data = dset1
    table = tbl2
    expr = {abs(Ex), abs(Ey), abs(Ez), abs(Hx), abs(Hy), abs(Hz)}
    unit = {V/m, V/m, V/m, A/m, A/m, A/m}
  gev1: EvalGlobal "Global Evaluation 1" | data = dset1; table = tbl1; expr = beta

Tables
  tbl1: Table "Propagation constant"
    // Global Evaluation 1
    Effective mode index (1) | beta (1/m)
    1.0739+5.38701e-09i | 4.35325e+06+0.0218371i
    1.07592+7.13891e-09i | 4.36142e+06+0.0289388i
    1.10215+3.9985e-11i | 4.46775e+06+0.000162086i
    1.10564+2.43498e-13i | 4.48188e+06+9.8706e-07i
    1.1191+8.42559e-14i | 4.53644e+06+3.41545e-07i
    1.12361+4.09794e-14i | 4.55475e+06+1.66117e-07i
  tbl2: Table "Field components"
    // Surface Average 1
    Effective mode index (1) | abs(Ex) (V/m) | abs(Ey) (V/m) | abs(Ez) (V/m) | abs(Hx) (A/m) | abs(Hy) (A/m) | abs(Hz) (A/m)
    1.0739+5.38701e-09i | 0.689527 | 15.5833 | 2.54242 | 0.0029503 | 0.00196933 | 0.0126488
    1.07592+7.1389e-09i | 11.5397 | 0.177083 | 3.21338 | 0.0014181 | 0.00335552 | 0.0050526
    1.10215+3.99833e-11i | 0.397476 | 15.6619 | 2.63639 | 0.00304976 | 0.00132039 | 0.0082683
    1.10564+2.41153e-13i | 17.6087 | 0.124901 | 3.1633 | 0.00138022 | 0.00224625 | 0.00773423
    1.1191+8.60364e-14i | 0.191013 | 15.9593 | 2.72686 | 0.00315325 | 0.000665093 | 0.00412524
    1.12361+3.89965e-14i | 35.6225 | 0.119703 | 3.13069 | 0.00136201 | 0.00112061 | 0.0156137

Plots
  pg1: PlotGroup2D "E-field (emw)" | data = dset1
    surf1: Surface | expr = emw.normE
    arws1: ArrowSurface | expr = {emw.Ex, emw.Ey}; xnumber = 50; ynumber = 50
  pg2: PlotGroup2D "H-field" | data = dset1
    surf1: Surface | expr = sqrt(abs(Hx)^2 + abs(Hy)^2 + abs(Hz)^2)
    arws1: ArrowSurface | expr = {emw.Hx, emw.Hy}; xnumber = 50; ynumber = 50

Exports
  img1: Image "normE"
    size = current
    unit = px
    width = 800
    height = 600
    pngfilename = C:\Users\eduar\Desktop\Estudos\pos_graduacao\topicos_de_optica_e_fotonica_FI254\projeto1\graficos\comsol_individual_waveguide\TiO2_normE_6.png
  img2: Image "normH"
    size = current
    unit = px
    width = 800
    height = 600
    pngfilename = C:\Users\eduar\Desktop\Estudos\pos_graduacao\topicos_de_optica_e_fotonica_FI254\projeto1\graficos\comsol_individual_waveguide\TiO2_normH_6.png